*Heading
 Two-dimensional overhead hoist frame
** Job name: Frame Model name: standard
** Generated by: Abaqus/CAE 6.13-1
*Preprint, echo=YES, model=YES, history=YES, contact=YES
**
** PARTS
**
*Part, name=Frame
*Node
      1,      1.51352,   0.71351999
      2,   1.28240001,   0.71351999
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*Element, type=CPS3
 1, 659, 638, 373
 2, 615, 538, 316
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*Element, type=CPS4R
 15,  29, 387, 156,   1
 16, 156, 387, 400, 155
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*Nset, nset=polygon, generate
   1,  284,    1
*Elset, elset=polygon
  15,  16,  17,  18,  19,  20
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*Nset, nset=everything, generate
    1,  1279,     1
*Elset, elset=everything, generate
    1,  1149,     1
** Region: (Section-3:everything)
*Elset, elset=_I1, internal
    1,    2,    3,    4,    5,    6
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** Section: Section-3
*Solid Section, elset=_I1, material=Steel
1.,
** Region: (Section-3:everything), (Beam Orientation:polygon)
*Elset, elset=_I2, internal
  15,  16,  17,  18,  19,  20
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** Section: Section-3
*Solid Section, elset=_I2, material=Steel
1.,
*End Part
**
*Part, name=plane
*Node
      1,      3.02704, -0.727790415
      2,   3.00705957, -0.727790415
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*Element, type=B21
  1,   1,   2
  2,   2,   3
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*Nset, nset=planar, generate
   1,  304,    1
*Elset, elset=planar, generate
   1,  303,    1
** Section: plane  Profile: Profile-1
*Beam Section, elset=planar, material=Rigidbody, temperature=GRADIENTS, section=BOX
1., 1., 0.25, 0.25, 0.25, 0.25
0.,0.,-1.
*End Part
**
*Part, name=planetop
*Node
      1,      3.02704,  0.727790415
      2,   2.99706936,  0.727790415
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*Element, type=B21
  1,   1,   2
  2,   2,   3
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*Nset, nset=planar2, generate
   1,  203,    1
*Elset, elset=planar2, generate
   1,  202,    1
** Section: plane  Profile: Profile-1
*Beam Section, elset=planar2, material=Rigidbody, temperature=GRADIENTS, section=BOX
1., 1., 0.25, 0.25, 0.25, 0.25
0.,0.,-1.
*End Part
**
**
** ASSEMBLY
**
*Assembly, name=Assembly
**
*Instance, name=Frame-1, part=Frame
*End Instance
**
*Instance, name=plane-1, part=plane
*End Instance
**
*Instance, name=planetop-1, part=planetop
*End Instance
**
*Nset, nset=Set-5, instance=Frame-1
  27,  28, 271, 272, 273, 274, 275, 276, 277
*Elset, elset=Set-5, instance=Frame-1
 734, 735, 739, 743, 865, 869, 875, 877
*Nset, nset=botedge, instance=Frame-1
   6,   7,  22,  23,  92,  93
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*Elset, elset=botedge, instance=Frame-1
  55,  57,  59, 119, 253, 286, 289, 290, 665, 670, 705, 707, 708, 841, 842, 843
*Nset, nset=leftedge, instance=Frame-1
  15,  21,  22,  28, 201, 202
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*Elset, elset=leftedge, instance=Frame-1
 612, 659, 661, 668, 669, 705, 744, 746, 747, 838, 839, 840, 865, 866, 883, 889
*Nset, nset=rightedge, instance=Frame-1
   1,   7,   8,  14,  99, 100
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*Elset, elset=rightedge, instance=Frame-1
  15,  16,  17,  18,  20,  59,  60,  62, 136, 137, 260, 279, 280, 281, 299, 305
*Nset, nset=topedge, instance=Frame-1
   1,   2,  27,  28,  29,  30
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*Elset, elset=topedge, instance=Frame-1
  15,  21,  27,  72,  76, 236, 291, 294, 734, 735, 739, 743, 865, 869, 875, 877
*Elset, elset=_Surf-2_S4, internal, instance=Frame-1
  42,  43,  77,  84,  98, 107
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*Elset, elset=_Surf-2_S2, internal, instance=Frame-1
  37,  40,  85,  88, 104, 108
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*Elset, elset=_Surf-2_S3, internal, instance=Frame-1
  32,  33,  44, 120, 121, 122
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*Elset, elset=_Surf-2_S1, internal, instance=Frame-1
  34,  35,  45, 111, 126, 127
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*Surface, type=ELEMENT, name=Surf-2
_Surf-2_S4, S4
_Surf-2_S2, S2
_Surf-2_S3, S3
_Surf-2_S1, S1
*Elset, elset=_plane_SPOS, internal, instance=plane-1, generate
   1,  303,    1
*Surface, type=ELEMENT, name=plane
_plane_SPOS, SPOS
*Elset, elset=_planetop_SPOS, internal, instance=planetop-1, generate
   1,  202,    1
*Surface, type=ELEMENT, name=planetop
_planetop_SPOS, SPOS
*Surface, type=NODE, name=Frame-1_polygon_CNS_, internal
Frame-1.polygon, 1.
*End Assembly
**
** MATERIALS
**
*Material, name=Rigidbody
*Elastic
 2e+07,
*Material, name=Steel
*Elastic
200000., 0.3
**
** INTERACTION PROPERTIES
**
*Surface Interaction, name=interior
1.,
*Surface Behavior, pressure-overclosure=HARD
**
** CONTACT INITIALIZATION DATA
**
*Contact Initialization Data, name=CInit-1
**
** INTERACTIONS
**
** Interaction: planeandframe
*Contact Pair, interaction=interior, adjust=botedge, tied
Frame-1_polygon_CNS_, plane
** Interaction: planetopandframe
*Contact Pair, interaction=interior, adjust=topedge, tied
Frame-1_polygon_CNS_, planetop
** ----------------------------------------------------------------
**
** STEP: Apply load
**
*Step, name="Apply load", nlgeom=NO, inc=10000
Description
*Static
0.01, 50., 2e-05, 0.025
**
** BOUNDARY CONDITIONS
**
** Name: leftedge Type: Symmetry/Antisymmetry/Encastre
*Boundary
leftedge, XSYMM
** Name: planelock Type: Displacement/Rotation
*Boundary
plane-1.planar, 1, 1
plane-1.planar, 2, 2
plane-1.planar, 6, 6
** Name: rightedge Type: Symmetry/Antisymmetry/Encastre
*Boundary
rightedge, XSYMM
** Name: velocity Type: Velocity/Angular velocity
*Boundary, type=VELOCITY
planetop-1.planar2, 1, 1
planetop-1.planar2, 2, 2, -1.
planetop-1.planar2, 6, 6
**
** OUTPUT REQUESTS
**
*Restart, write, frequency=0
**
** FIELD OUTPUT: F-Output-1
**
*Output, field, variable=PRESELECT, frequency=100
**
** HISTORY OUTPUT: H-Output-1
**
*Output, history, variable=PRESELECT, frequency=100
*End Step
